# OpenSim document version 40000
Model Quaddy_test:
  gravity: 0 -9.80665 0
  length_units: meters
  force_units: N
  credits:
    Frank Anderson, Peter Loan, Ayman Habib, Ajay Seth, Michael Sherman
  Ground
  BodySet:
    Body pelvis: mass=15.625 [kg] mass_center=(-0.125 0 0) inertia=(0.16276 0.16276 0.16276 0 0 0)
        meshes=Quaddy_v3_Geometries\pelvis.vtp
      WrapCylinder wrap_hip: translation=(-0.223 -0.093 0) quadrant=-x radius=0.045 length=0.3
    Body thigh_r: mass=1.56712 mass_center=(-0.223 -0.225 0.098)
        inertia=(0.00620089 0.00195432 0.00620089 7.62939e-17 7.9305e-12 -7.62939e-17)
        meshes=Quaddy_v3_Geometries\thigh_r.vtp
      WrapCylinder wrap_knee_r: translation=(-0.223 -0.301 0.098) quadrant=-y radius=0.045 length=0.07
    Body thigh_l: mass=1.56712 mass_center=(-0.223 -0.225 -0.098)
        inertia=(0.00620089 0.00195432 0.00620089 1.52588e-17 -7.93054e-12 -2.28882e-17)
        meshes=Quaddy_v3_Geometries\thigh_l.vtp
      WrapCylinder wrap_knee_l: translation=(-0.223 -0.301 -0.098) quadrant=-y radius=0.045 length=0.07
    Body shank_r: mass=0.3901653 mass_center=(-0.223 -0.425 0.098)
        inertia=(0.00136112 0.000121141 0.00136112 3.8147e-17 -2.86102e-18 3.8147e-18)
        meshes=Quaddy_v3_Geometries\shank_r.vtp
    Body shank_l: mass=0.3901653 mass_center=(-0.223 -0.425 -0.098)
        inertia=(0.00136112 0.000121141 0.00136112 1.06812e-16 2.28882e-17 2.67029e-17)
        meshes=Quaddy_v3_Geometries\shank_l.vtp
    Body hum_r: mass=1.56712 mass_center=(0.223 -0.225 0.098)
        inertia=(0.00620089 0.00195432 0.00620089 -1.52588e-17 -7.93054e-12 2.28882e-17)
        meshes=Quaddy_v3_Geometries\hum_r.vtp
      WrapCylinder wrap_elbow_r: translation=(0.223 -0.301 0.098) quadrant=-y radius=0.045 length=0.07
    Body hum_l: mass=1.56712 mass_center=(0.223 -0.225 -0.098)
        inertia=(0.00620089 0.00195432 0.00620089 -7.62939e-17 7.9305e-12 7.62939e-17)
        meshes=Quaddy_v3_Geometries\hum_l.vtp
      WrapCylinder wrap_elbow_l: translation=(0.223 -0.301 -0.098) quadrant=-y radius=0.045 length=0.07
    Body forearm_r: mass=0.3901653 mass_center=(0.223 -0.425 0.098)
        inertia=(0.00136112 0.000121141 0.00136112 -8.39233e-17 1.62125e-17 -1.52588e-17)
        meshes=Quaddy_v3_Geometries\forearm_r.vtp
    Body forearm_l: mass=0.3901653 mass_center=(0.223 -0.425 -0.098)
        inertia=(0.00136112 0.000121141 0.00136112 -3.8147e-17 -2.86102e-18 -3.8147e-18)
        meshes=Quaddy_v3_Geometries\forearm_l.vtp
    Body torso: mass=18.22946 mass_center=(0.15146 0.0256597 0) inertia=(0.239945 0.25227 0.324278 0.0742535 0 0)
        meshes=Quaddy_v3_Geometries\torso.vtp
      WrapCylinder wrap_shoulder_ext: translation=(0.223 -0.093 0) quadrant=-x radius=0.045 length=0.3
      WrapCylinder wrap_shoulder_flex: translation=(0.223 -0.093 0) quadrant=+x radius=0.045 length=0.3
  JointSet:
    PlanarJoint groundPelvis: socket_parent_frame=ground_offset socket_child_frame=pelvis_offset
      Coordinate pelvis_tilt: range=(-3.141593 3.141593)
      Coordinate pelvis_tx: range=(-10 10)
      Coordinate pelvis_ty: range=(-10 10)
      PhysicalOffsetFrame ground_offset: socket_parent=/ground translation=(0 0 0) [meters]
      PhysicalOffsetFrame pelvis_offset: socket_parent=/bodyset/pelvis translation=(0 0 0)
    CustomJoint hip_r: socket_parent_frame=pelvis_offset socket_child_frame=thigh_r_offset
      Coordinate hip_flexion_r: range=(-3.141593 3.141593)
      PhysicalOffsetFrame pelvis_offset: socket_parent=/bodyset/pelvis translation=(-0.223 -0.093 0.098)
      PhysicalOffsetFrame thigh_r_offset: socket_parent=/bodyset/thigh_r translation=(-0.223 -0.093 0.098)
      SpatialTransform: axes_held_at_zero=(rotation1 rotation2 translation1 translation2 translation3)
        TransformAxis rotation3: coordinates=hip_flexion_r axis=(0 0 1) LinearFunction(coefficients=1 0)
    CustomJoint hip_l: socket_parent_frame=pelvis_offset socket_child_frame=thigh_l_offset
      Coordinate hip_flexion_l: range=(-3.141593 3.141593)
      PhysicalOffsetFrame pelvis_offset: socket_parent=/bodyset/pelvis translation=(-0.223 -0.093 -0.098)
      PhysicalOffsetFrame thigh_l_offset: socket_parent=/bodyset/thigh_l translation=(-0.223 -0.093 -0.098)
      SpatialTransform: axes_held_at_zero=(rotation1 rotation2 translation1 translation2 translation3)
        TransformAxis rotation3: coordinates=hip_flexion_l axis=(0 0 1) LinearFunction(coefficients=1 0)
    CustomJoint knee_r: socket_parent_frame=thigh_r_offset socket_child_frame=shank_r_offset
      Coordinate knee_angle_r: range=(-3.141593 3.141593)
      PhysicalOffsetFrame thigh_r_offset: socket_parent=/bodyset/thigh_r translation=(-0.223 -0.301 0.098)
      PhysicalOffsetFrame shank_r_offset: socket_parent=/bodyset/shank_r translation=(-0.223 -0.301 0.098)
      SpatialTransform: axes_held_at_zero=(rotation1 rotation2 translation1 translation2 translation3)
        TransformAxis rotation3: coordinates=knee_angle_r axis=(0 0 1) LinearFunction(coefficients=1 0)
    CustomJoint knee_l: socket_parent_frame=thigh_l_offset socket_child_frame=shank_l_offset
      Coordinate knee_angle_l: range=(-3.141593 3.141593)
      PhysicalOffsetFrame thigh_l_offset: socket_parent=/bodyset/thigh_l translation=(-0.223 -0.301 -0.098)
      PhysicalOffsetFrame shank_l_offset: socket_parent=/bodyset/shank_l translation=(-0.223 -0.301 -0.098)
      SpatialTransform: axes_held_at_zero=(rotation1 rotation2 translation1 translation2 translation3)
        TransformAxis rotation3: coordinates=knee_angle_l axis=(0 0 1) LinearFunction(coefficients=1 0)
    CustomJoint shoulder_r: socket_parent_frame=torso_offset socket_child_frame=hum_r_offset
      Coordinate shoulder_flexion_r: range=(-3.141593 3.141593)
      PhysicalOffsetFrame torso_offset: socket_parent=/bodyset/torso translation=(0.223 -0.093 0.098)
      PhysicalOffsetFrame hum_r_offset: socket_parent=/bodyset/hum_r translation=(0.223 -0.093 0.098)
      SpatialTransform: axes_held_at_zero=(rotation1 rotation2 translation1 translation2 translation3)
        TransformAxis rotation3: coordinates=shoulder_flexion_r axis=(0 0 1) LinearFunction(coefficients=1 0)
    CustomJoint shoulder_l: socket_parent_frame=torso_offset socket_child_frame=hum_l_offset
      Coordinate shoulder_flexion_l: range=(-3.141593 3.141593)
      PhysicalOffsetFrame torso_offset: socket_parent=/bodyset/torso translation=(0.223 -0.093 -0.098)
      PhysicalOffsetFrame hum_l_offset: socket_parent=/bodyset/hum_l translation=(0.223 -0.093 -0.098)
      SpatialTransform: axes_held_at_zero=(rotation1 rotation2 translation1 translation2 translation3)
        TransformAxis rotation3: coordinates=shoulder_flexion_l axis=(0 0 1) LinearFunction(coefficients=1 0)
    CustomJoint elbow_r: socket_parent_frame=hum_r_offset socket_child_frame=forearm_r_offset
      Coordinate elbow_angle_r: range=(-3.141593 3.141593)
      PhysicalOffsetFrame hum_r_offset: socket_parent=/bodyset/hum_r translation=(0.223 -0.301 0.098)
      PhysicalOffsetFrame forearm_r_offset: socket_parent=/bodyset/forearm_r translation=(0.223 -0.301 0.098)
      SpatialTransform: axes_held_at_zero=(rotation1 rotation2 translation1 translation2 translation3)
        TransformAxis rotation3: coordinates=elbow_angle_r axis=(0 0 1) LinearFunction(coefficients=1 0)
    CustomJoint elbow_l: socket_parent_frame=hum_l_offset socket_child_frame=forearm_l_offset
      Coordinate elbow_angle_l: range=(-3.141593 3.141593)
      PhysicalOffsetFrame hum_l_offset: socket_parent=/bodyset/hum_l translation=(0.223 -0.301 -0.098)
      PhysicalOffsetFrame forearm_l_offset: socket_parent=/bodyset/forearm_l translation=(0.223 -0.301 -0.098)
      SpatialTransform: axes_held_at_zero=(rotation1 rotation2 translation1 translation2 translation3)
        TransformAxis rotation3: coordinates=elbow_angle_l axis=(0 0 1) LinearFunction(coefficients=1 0)
    WeldJoint lumbar: socket_parent_frame=pelvis_offset socket_child_frame=torso_offset
      PhysicalOffsetFrame pelvis_offset: socket_parent=/bodyset/pelvis translation=(0 0 0)
      PhysicalOffsetFrame torso_offset: socket_parent=/bodyset/torso translation=(0 0 0)
  ForceSet:
    DeGrooteFregly2016Muscle [values shared by the 7 below unless stated]: min_control=0.01 max_control=1
        tendon_slack_length=0 pennation_angle_at_optimal=0 [radians] max_contraction_velocity=10
        activation_time_constant=0.015 deactivation_time_constant=0.05 default_activation=0.05 fiber_damping=0
        passive_fiber_strain_at_one_norm_force=0.6 tendon_strain_at_one_norm_force=0.04
    DeGrooteFregly2016Muscle SF_r: max_isometric_force=1412.781 optimal_fiber_length=0.2254601
        ignore_tendon_compliance=true
      PathPoint SF_or_R: torso (0.25 0 0.098)
      PathPoint SF_in_R: hum_r (0.27 -0.2 0.098)
      PathWrap: wrap_object=wrap_shoulder_flex method=hybrid
    DeGrooteFregly2016Muscle SE_r: max_isometric_force=2430.515 optimal_fiber_length=0.1965791
        ignore_tendon_compliance=true
      PathPoint SE_or_R: torso (0.1 0 0.125)
      PathPoint SE_in_R: hum_r (0.175 -0.2 0.098)
      PathWrap: wrap_object=wrap_shoulder_ext method=hybrid
    DeGrooteFregly2016Muscle EF_r: max_isometric_force=1877.733 optimal_fiber_length=0.1130887
        ignore_tendon_compliance=true
      PathPoint EF_or_R: hum_r (0.27 -0.25 0.098)
      PathPoint EF_in_R: forearm_r (0.245 -0.4 0.098)
    DeGrooteFregly2016Muscle EE_r: max_isometric_force=1448.426 optimal_fiber_length=0.2199115
        ignore_tendon_compliance=true
      PathPoint EE_or_R: hum_r (0.175 -0.25 0.098)
      PathPoint EE_in_R: forearm_r (0.2 -0.4 0.098)
      PathWrap: wrap_object=wrap_elbow_r method=hybrid
    DeGrooteFregly2016Muscle HF_r: max_isometric_force=2063.012 optimal_fiber_length=0.188709
        ignore_tendon_compliance=true
      PathPoint HF_or_R: pelvis (-0.1 0 0.125)
      PathPoint HF_in_R: thigh_r (-0.175 -0.2 0.098)
    DeGrooteFregly2016Muscle HEKF_r: max_isometric_force=1969.051 optimal_fiber_length=0.4283805
        ignore_tendon_compliance=true
      PathPoint HE_or_R: pelvis (-0.25 0 0.098)
      PathPoint KF_or_R: thigh_r (-0.27 -0.25 0.098)
      PathPoint KF_in_R: shank_r (-0.245 -0.4 0.098)
      PathWrap: wrap_object=wrap_hip method=hybrid range=(-1 2)
    DeGrooteFregly2016Muscle KE_r: max_isometric_force=1770.299 optimal_fiber_length=0.2199115
        tendon_slack_length=0.01885503
      PathPoint KE_or_R: thigh_r (-0.175 -0.25 0.098)
      PathPoint KE_in_R: shank_r (-0.2 -0.4 0.098)
      PathWrap: wrap_object=wrap_knee_r method=hybrid
  ContactGeometrySet:
    ContactHalfSpace GroundContact: socket_frame=/ground location=(0 0 0) orientation=(0 0 -1.57)
    ContactSphere RFootContact: socket_frame=/bodyset/shank_r location=(-0.223 -0.525 0.098) radius=0.05
    ContactSphere RHandContact: socket_frame=/bodyset/forearm_r location=(0.223 -0.525 0.098) radius=0.05
    ContactSphere LFootContact: socket_frame=/bodyset/shank_l location=(-0.223 -0.525 -0.098) radius=0.05
    ContactSphere LHandContact: socket_frame=/bodyset/forearm_l location=(0.223 -0.525 -0.098) radius=0.05
  ComponentSet:
    SmoothSphereHalfSpaceForce RFootForce: socket_sphere=/contactgeometryset/RFootContact
        socket_half_space=/contactgeometryset/GroundContact stiffness=500000 [N/m^2] dissipation=2 [s/m]
        static_friction=0.8 dynamic_friction=0.4 viscous_friction=0.4 transition_velocity=0.2 [m/s]
    SmoothSphereHalfSpaceForce RHandForce: socket_sphere=/contactgeometryset/RHandContact
        socket_half_space=/contactgeometryset/GroundContact stiffness=500000 dissipation=2 static_friction=0.8
        dynamic_friction=0.4 viscous_friction=0.4 transition_velocity=0.2
    SmoothSphereHalfSpaceForce LFootForce: socket_sphere=/contactgeometryset/LFootContact
        socket_half_space=/contactgeometryset/GroundContact stiffness=500000 dissipation=2 static_friction=0.8
        dynamic_friction=0.4 viscous_friction=0.4 transition_velocity=0.2
    SmoothSphereHalfSpaceForce LHandForce: socket_sphere=/contactgeometryset/LHandContact
        socket_half_space=/contactgeometryset/GroundContact stiffness=500000 dissipation=2 static_friction=0.8
        dynamic_friction=0.4 viscous_friction=0.4 transition_velocity=0.2
